# OpenSim document version 40600
Model WROI_SK_R:
  gravity: 0 -9.80665 0
  credits: Golyski et al. (2025); Rajagopal et al. (2016)
  length_units: meters
  force_units: N
  publications:
    [1] Golyski, P. R., Potter, B. K., Forsberg, J. A., Hendershot, B. D. (2025). Comparing the mechanical energetics of walking among individuals with unilateral transfemoral limb loss using socket and osseointegrated prosthetic interfaces. Scientific Reports. [2] Rajagopal, A., Dembia, C.L., DeMers, M.S., Delp, D.D., Hicks, J.L., Delp, S.L. (2016) Full-body musculoskeletal model for muscle-driven simulation of human gait. IEEE Transactions on Biomedical Engineering.
  Ground
  BodySet:
    Body pelvis: mass=11.777 [kg] mass_center=(-0.0707 0 0) inertia=(0.1028 0.0871 0.0579 0 0 0)
        meshes=(r_pelvis.vtp l_pelvis.vtp sacrum.vtp)
      WrapCylinder Gmax1_at_pelvis_r: xyz_body_rotation=(-0.6 0.45 0) translation=(-0.077 -0.099 0.061) quadrant=-x
          radius=0.04 length=0.15
      WrapCylinder Gmax2_at_pelvis_r: xyz_body_rotation=(-0.75 0.39 0) translation=(-0.08 -0.083 0.068) quadrant=all
          radius=0.04 length=0.1
      WrapCylinder Gmax3_at_pelvis_r: xyz_body_rotation=(-0.1 0 0) translation=(-0.083 -0.088 0.068) quadrant=all
          radius=0.04 length=0.1
      WrapCylinder Gmax1_at_pelvis_l: xyz_body_rotation=(0.6 -0.45 0) translation=(-0.077 -0.099 -0.061) quadrant=-x
          radius=0.04 length=0.15
      WrapCylinder Gmax2_at_pelvis_l: xyz_body_rotation=(0.75 -0.39 0) translation=(-0.08 -0.083 -0.068) quadrant=all
          radius=0.04 length=0.1
      WrapCylinder Gmax3_at_pelvis_l: xyz_body_rotation=(0.1 0 0) translation=(-0.083 -0.088 -0.068) quadrant=all
          radius=0.04 length=0.1
      WrapCylinder PS_at_brim_r: xyz_body_rotation=(-0.25 -0.27 0.1) translation=(-0.074 -0.06 0.0656) quadrant=-y
          radius=0.05 length=0.1
      WrapCylinder PS_at_brim_l: xyz_body_rotation=(0.25 0.27 0.1) translation=(-0.074 -0.06 -0.0656) quadrant=-y
          radius=0.05 length=0.1
      WrapCylinder IL_at_brim_r: xyz_body_rotation=(-0.32 -0.24 0.9) translation=(-0.071 -0.065 0.0756) quadrant=-y
          radius=0.0549 length=0.1
      WrapCylinder IL_at_brim_l: xyz_body_rotation=(0.32 0.24 0.9) translation=(-0.071 -0.065 -0.0756) quadrant=-y
          radius=0.0549 length=0.1
    Body femur_r: mass=4.6507 mass_center=(0 -0.085 0) inertia=(0.02204 0.004521 0.02204 0 0 0) meshes=femur_r_cut.stl
      WrapCylinder AB_at_femshaft_r: xyz_body_rotation=(1.66157 0.186644 0) translation=(0.0146434 -0.112595 0.023365)
          quadrant=all radius=0.0165 length=0.07
      WrapCylinder AL_at_femshaft_r: xyz_body_rotation=(1.77711 0.136489 0) translation=(0.0307327 -0.231909 0.0151137)
          quadrant=all radius=0.0201 length=0.1
      WrapCylinder AMprox_at_femshaft_r: xyz_body_rotation=(1.61126 0.18656 0)
          translation=(0.00518299 -0.0728948 0.025403) quadrant=all radius=0.0211 length=0.07
      WrapCylinder AMmid_at_femshaft_r: xyz_body_rotation=(1.61139 0.13656 0)
          translation=(0.0230125 -0.160711 0.0205842) quadrant=all radius=0.0214 length=0.12
    Body socket_r: mass=0.641785 mass_center=(0 0.109512 0.004933) inertia=(0.00479 0.002818 0.004804 0 0 0.00039)
        meshes=1_Hip.stl
    Body femurpylon_r: mass=0.114 mass_center=(0 -0.079713 0) inertia=(0.000252 2.1e-5 0.000252 0 0 0)
    Body proskneepyr_r: mass=0.274692 mass_center=(-0.003004 -0.003683 0) inertia=(8.3e-5 8.9e-5 7.1e-5 -5e-6 0 0)
    Body prosknee_r: mass=1.157311 mass_center=(-0.018228 -0.109006 0)
        inertia=(0.004077 0.000994 0.004497 -0.000257 0 0) meshes=2_hiptoknee.STL
    Body tibiapylon_r: mass=0.017582 mass_center=(0 -0.012294 0) inertia=(3e-6 3e-6 3e-6 0 0 0) meshes=3_LegKnee.STL
    Body prosfoot_top_r: mass=0.544184 mass_center=(0.000888 -0.034445 0)
        inertia=(0.000602 0.000232 0.000584 1.5e-5 0 0) meshes=4_FH.STL
    Body prosfoot_bot_r: mass=0.686227 mass_center=(0.049047 -0.047868 0.00162)
        inertia=(0.000708 0.003863 0.003752 -0.000323 3.5e-5 1.5e-5) meshes=5_HV.STL
    Body femur_l: mass=9.3014 mass_center=(0 -0.17 0) inertia=(0.1339 0.0351 0.1412 0 0 0) meshes=l_femur.vtp
      WrapCylinder Gastroc_at_condyles_l: translation=(0.005 -0.41 0) quadrant=all radius=0.025 length=0.1
      WrapCylinder KnExt_at_fem_l: xyz_body_rotation=(0.0623366 -0.0507601 0)
          translation=(0.00358828 -0.402732 -0.00209111) quadrant=all radius=0.025 length=0.1
      WrapCylinder AB_at_femshaft_l: xyz_body_rotation=(-1.66157 -0.186644 0)
          translation=(0.0146434 -0.112595 -0.023365) quadrant=all radius=0.0165 length=0.07
      WrapCylinder AL_at_femshaft_l: xyz_body_rotation=(-1.77711 -0.136489 0)
          translation=(0.0307327 -0.231909 -0.0151137) quadrant=all radius=0.0201 length=0.1
      WrapCylinder AMprox_at_femshaft_l: xyz_body_rotation=(-1.61126 -0.18656 0)
          translation=(0.00518299 -0.0728948 -0.025403) quadrant=all radius=0.0211 length=0.07
      WrapCylinder AMmid_at_femshaft_l: xyz_body_rotation=(-1.61139 -0.13656 0)
          translation=(0.0230125 -0.160711 -0.0205842) quadrant=all radius=0.0214 length=0.12
      WrapCylinder AMdist_at_femshaft_l: xyz_body_rotation=(-1.71188 -0.186636 0)
          translation=(0.0316065 -0.260736 -0.0093646) quadrant=all radius=0.0218 length=0.2
      WrapCylinder AMisch_at_condyles_l: xyz_body_rotation=(-1.71115 0.463363 0)
          translation=(-0.0226511 -0.376831 0.00315437) quadrant=all radius=0.04 length=0.24
      WrapCylinder PECT_at_femshaft_l: xyz_body_rotation=(-1.81295 -0.276344 0)
          translation=(0.00608573 -0.0845029 -0.0304405) quadrant=all radius=0.015 length=0.05
    Body tibia_l: mass=3.7075 mass_center=(0 -0.1867 0) inertia=(0.0504 0.0051 0.0511 0 0 0)
        meshes=(l_tibia.vtp l_fibula.vtp)
      WrapCylinder GasLat_at_shank_l: xyz_body_rotation=(-2.96723 0.279725 -1.47812)
          translation=(-0.0074 -0.074 0.0033) quadrant=-y radius=0.055 length=0.1
      WrapCylinder GasMed_at_shank_l: xyz_body_rotation=(-2.96723 -0.0279725 -1.47812)
          translation=(-0.0074 -0.074 0.0033) quadrant=-y radius=0.055 length=0.1
      WrapCylinder GR_at_condyles_l: xyz_body_rotation=(0 0.4 0) translation=(-0.003 -0.02 0) quadrant=all radius=0.036
          length=0.1
      WrapCylinder SM_at_condyles_l: xyz_body_rotation=(0 0.1 0) translation=(-0.001 -0.02 0) quadrant=all
          radius=0.0352 length=0.1
      WrapCylinder ST_at_condyles_l: xyz_body_rotation=(0 0.2 0) translation=(-0.002 -0.0205 0) quadrant=all
          radius=0.0425 length=0.1
      WrapCylinder BF_at_gastroc_l: translation=(-0.058 -0.06 0) quadrant=all radius=0.03 length=0.15
    Body patella_l: mass=0.0862 mass_center=(0.0018 0.0264 0) inertia=(2.87e-6 1.311e-5 1.311e-5 0 0 0)
        meshes=l_patella.vtp
    Body talus_l: mass=0.1 mass_center=(0 0 0) inertia=(0.001 0.001 0.001 0 0 0) meshes=l_talus.vtp
    Body calcn_l: mass=1.25 mass_center=(0.1 0.03 0) inertia=(0.0014 0.0039 0.0041 0 0 0) meshes=l_foot.vtp
    Body toes_l: mass=0.2166 mass_center=(0.0346 0.006 0.0175) inertia=(0.0001 0.0002 0.001 0 0 0) meshes=l_bofoot.vtp
    Body torso: mass=26.8266 mass_center=(-0.03 0.32 0) inertia=(1.4745 0.7555 1.4314 0 0 0)
        meshes=(hat_spine.vtp hat_jaw.vtp hat_skull.vtp hat_ribs_scap.vtp)
    Body humerus_r: mass=2.0325 mass_center=(0 -0.164502 0) inertia=(0.011946 0.004121 0.013409 0 0 0)
        meshes=humerus_rv.vtp
    Body ulna_r: mass=0.6075 mass_center=(0 -0.120525 0) inertia=(0.002962 0.000618 0.003213 0 0 0) meshes=ulna_rv.vtp
    Body radius_r: mass=0.6075 mass_center=(0 -0.120525 0) inertia=(0.002962 0.000618 0.003213 0 0 0)
        meshes=radius_rv.vtp
    Body hand_r: mass=0.4575 mass_center=(0 -0.068095 0) inertia=(0.000892 0.000547 0.00134 0 0 0)
        meshes=(pisiform_rvs.vtp lunate_rvs.vtp scaphoid_rvs.vtp triquetrum_rvs.vtp hamate_rvs.vtp capitate_rvs.vtp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)
    Body humerus_l: mass=2.0325 mass_center=(0 -0.164502 0) inertia=(0.011946 0.004121 0.013409 0 0 0)
        meshes=humerus_lv.vtp
    Body ulna_l: mass=0.6075 mass_center=(0 -0.120525 0) inertia=(0.002962 0.000618 0.003213 0 0 0) meshes=ulna_lv.vtp
    Body radius_l: mass=0.6075 mass_center=(0 -0.120525 0) inertia=(0.002962 0.000618 0.003213 0 0 0)
        meshes=radius_lv.vtp
    Body hand_l: mass=0.4575 mass_center=(0 -0.068095 0) inertia=(0.000892 0.000547 0.00134 0 0 0)
        meshes=(pisiform_lvs.vtp lunate_lvs.vtp scaphoid_lvs.vtp triquetrum_lvs.vtp hamate_lvs.vtp capitate_lvs.vtp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)
  JointSet:
    CustomJoint ground_pelvis: socket_parent_frame=ground_offset socket_child_frame=pelvis_offset
      Coordinate pelvis_tilt: default_value=0 range=(-1.570796 1.570796) clamped=true
      Coordinate pelvis_list: default_value=0 range=(-1.570796 1.570796) clamped=true
      Coordinate pelvis_rotation: default_value=0 range=(-3.14 3.14) clamped=true
      Coordinate pelvis_tx: default_value=0 range=(-5 5) clamped=true
      Coordinate pelvis_ty: default_value=4.921289e-9 range=(-1 2) clamped=true
      Coordinate pelvis_tz: default_value=0 range=(-6 6) clamped=true
      PhysicalOffsetFrame ground_offset: socket_parent=/ground translation=(0.009000001 0.9469999 0) [meters]
      PhysicalOffsetFrame pelvis_offset: socket_parent=/bodyset/pelvis translation=(0 0 0)
      SpatialTransform:
        TransformAxis rotation1: coordinates=pelvis_tilt axis=(0 0 1) LinearFunction(coefficients=1 0)
        TransformAxis rotation2: coordinates=pelvis_list axis=(1 0 0) LinearFunction(coefficients=1 0)
        TransformAxis rotation3: coordinates=pelvis_rotation axis=(0 1 0) LinearFunction(coefficients=1 0)
        TransformAxis translation1: coordinates=pelvis_tx axis=(1 0 0) LinearFunction(coefficients=1 0)
        TransformAxis translation2: coordinates=pelvis_ty axis=(0 1 0) LinearFunction(coefficients=1 0)
        TransformAxis translation3: coordinates=pelvis_tz axis=(0 0 1) LinearFunction(coefficients=1 0)
    CustomJoint hip_r: socket_parent_frame=pelvis_offset socket_child_frame=femur_r_offset
      Coordinate hip_flexion_r: default_value=8.503791e-9 range=(-0.6981317 2.094395) clamped=true
      Coordinate hip_adduction_r: default_value=-5.562669e-9 range=(-0.8726646 0.5235988) clamped=true
      Coordinate hip_rotation_r: default_value=0 range=(-0.6981317 0.6981317) clamped=true
      PhysicalOffsetFrame pelvis_offset: socket_parent=/bodyset/pelvis translation=(-0.056276 -0.07849 0.07726)
      PhysicalOffsetFrame femur_r_offset: socket_parent=/bodyset/femur_r translation=(0 0 0)
      SpatialTransform: axes_held_at_zero=(translation1 translation2 translation3)
        TransformAxis rotation1: coordinates=hip_flexion_r axis=(0 0 1) LinearFunction(coefficients=1 0)
        TransformAxis rotation2: coordinates=hip_adduction_r axis=(1 0 0) LinearFunction(coefficients=1 0)
        TransformAxis rotation3: coordinates=hip_rotation_r axis=(0 1 0) LinearFunction(coefficients=1 0)
    FreeJoint femur_socket_r: socket_parent_frame=femur_r_offset socket_child_frame=socket_r_offset
      Coordinate socket_angle_ml_r: default_value=0 range=(-0.261799 0.261799) clamped=true locked=true
      Coordinate socket_angle_rot_r: default_value=0 range=(-0.261799 0.261799) clamped=true locked=true
      Coordinate socket_angle_ap_r: default_value=0 range=(-0.261799 0.261799) clamped=true locked=true
      Coordinate socket_trans_ap_r: default_value=0 range=(-0.1 0.1) clamped=true locked=true
      Coordinate socket_trans_vt_r: default_value=0 range=(-0.1 0.1) clamped=true
      Coordinate socket_trans_ml_r: default_value=0 range=(-0.1 0.1) clamped=true locked=true
      PhysicalOffsetFrame femur_r_offset: socket_parent=/bodyset/femur_r translation=(0.001 -0.1690002 0)
      PhysicalOffsetFrame socket_r_offset: socket_parent=/bodyset/socket_r translation=(0.03 -0.011 -0.02)
          orientation=(0 0 1.570796) [radians]
    CustomJoint socket_femurpylon_r: socket_parent_frame=socket_r_offset socket_child_frame=femurpylon_r_offset
      Coordinate femurpylon_trans_ap_r: default_value=0 range=(-0.05 0.05) clamped=true locked=true
      Coordinate femurpylon_trans_ml_r: default_value=0 range=(-0.05 0.05) clamped=true locked=true
      PhysicalOffsetFrame socket_r_offset: socket_parent=/bodyset/socket_r
      PhysicalOffsetFrame femurpylon_r_offset: socket_parent=/bodyset/femurpylon_r translation=(0 0.05199997 0)
          orientation=(0 0 4.712389)
      SpatialTransform:
        TransformAxis rotation1: axis=(1 0 0)
        TransformAxis rotation2: axis=(0 1 0)
        TransformAxis rotation3: axis=(0 0 1)
        TransformAxis translation1: coordinates=femurpylon_trans_ap_r axis=(1 0 0) LinearFunction(coefficients=1 0)
        TransformAxis translation2: axis=(0 1 0)
        TransformAxis translation3: coordinates=femurpylon_trans_ml_r axis=(0 0 1) LinearFunction(coefficients=1 0)
    WeldJoint femurpylon_proskneepyr_r: socket_parent_frame=femurpylon_r_offset socket_child_frame=proskneepyr_r_offset
      PhysicalOffsetFrame femurpylon_r_offset: socket_parent=/bodyset/femurpylon_r translation=(0 -0.159427 0)
      PhysicalOffsetFrame proskneepyr_r_offset: socket_parent=/bodyset/proskneepyr_r
          translation=(-0.03000002 1.887513e-8 2.235174e-8) orientation=(0 0 -1.570796)
    CustomJoint prosknee_hinge_r: socket_parent_frame=proskneepyr_r_offset socket_child_frame=prosknee_r_offset
      Coordinate prosknee_angle_r: default_value=0.0001193348 range=(0 2.35619) clamped=true
      PhysicalOffsetFrame proskneepyr_r_offset: socket_parent=/bodyset/proskneepyr_r
          translation=(0 -1.629815e-9 -2.328306e-10) orientation=(1.570796 1.570796 0)
      PhysicalOffsetFrame prosknee_r_offset: socket_parent=/bodyset/prosknee_r translation=(0 0 0)
          orientation=(0 4.712389 1.570796)
      SpatialTransform:
        TransformAxis rotation1: coordinates=prosknee_angle_r axis=(1 0 0) LinearFunction(coefficients=1 0)
        TransformAxis rotation2: axis=(0 1 0)
        TransformAxis rotation3: axis=(0 0 1)
        TransformAxis translation1: axis=(1 0 0)
        TransformAxis translation2: axis=(0 1 0)
        TransformAxis translation3: axis=(0 0 1)
    CustomJoint prosknee_pylon_r: socket_parent_frame=prosknee_r_offset socket_child_frame=tibiapylon_r_offset
      Coordinate rx: default_value=0 range=(0 1.7)
      PhysicalOffsetFrame prosknee_r_offset: socket_parent=/bodyset/prosknee_r
          translation=(0.03996426 -0.02730971 1.487109e-13) orientation=(2.116759e-21 -1.951564e-18 1.811824e-21)
      PhysicalOffsetFrame tibiapylon_r_offset: socket_parent=/bodyset/tibiapylon_r
          translation=(-0.001309782 0.003035717 0.013) orientation=(-5.841139e-18 -7.408055e-21 -1.570796)
      SpatialTransform:
        TransformAxis rotation1: axis=(1 0 0)
        TransformAxis rotation2: axis=(0 1 0)
        TransformAxis rotation3: coordinates=rx axis=(0 0 1) LinearFunction(coefficients=1 0)
        TransformAxis translation1: axis=(1 0 0)
        TransformAxis translation2: axis=(0 1 0)
        TransformAxis translation3: axis=(0 0 1)
    WeldJoint tibiapylon_prosfoot_r: socket_parent_frame=tibiapylon_r_offset socket_child_frame=prosfoot_top_r_offset
      PhysicalOffsetFrame tibiapylon_r_offset: socket_parent=/bodyset/tibiapylon_r translation=(0 -0.024589 0)
      PhysicalOffsetFrame prosfoot_top_r_offset: socket_parent=/bodyset/prosfoot_top_r
          translation=(0.004 -0.000999997 0.1190001) orientation=(1.570796 1.570796 0)
    CustomJoint prosankle_r: socket_parent_frame=prosfoot_top_r_offset socket_child_frame=prosfoot_bot_r_offset
      Coordinate prosankle_angle_ml_r: default_value=0 range=(-0.5235988 0.5235988) clamped=true
      Coordinate prosankle_angle_rot_r: default_value=0 range=(-0.5235988 0.5235988) clamped=true locked=true
      Coordinate prosankle_angle_r: default_value=-3.125299e-15 range=(-0.5235988 0.5235988) clamped=true
      Coordinate prosankle_trans_ap_r: default_value=0 range=(-0.01 0.01) clamped=true locked=true
      Coordinate prosankle_trans_vt_r: default_value=0 range=(-0.05 0.05) clamped=true
      Coordinate prosankle_trans_ml_r: default_value=0 range=(-0.01 0.01) clamped=true locked=true
      PhysicalOffsetFrame prosfoot_top_r_offset: socket_parent=/bodyset/prosfoot_top_r
          translation=(0.017 0.008815583 9.405801e-16) orientation=(-1.8611e-21 -1.158053e-22 2.779327e-21)
      PhysicalOffsetFrame prosfoot_bot_r_offset: socket_parent=/bodyset/prosfoot_bot_r
          translation=(0.0242335 0.01056776 -0.0002799986) orientation=(-1.111138e-20 -6.369291e-22 1.52863e-20)
      SpatialTransform:
        TransformAxis rotation1: coordinates=prosankle_angle_ml_r axis=(1 0 0) LinearFunction(coefficients=1 0)
        TransformAxis rotation2: coordinates=prosankle_angle_rot_r axis=(0 1 0) LinearFunction(coefficients=1 0)
        TransformAxis rotation3: coordinates=prosankle_angle_r axis=(0 0 1) LinearFunction(coefficients=1 0)
        TransformAxis translation1: coordinates=prosankle_trans_ap_r axis=(1 0 0) LinearFunction(coefficients=1 0)
        TransformAxis translation2: coordinates=prosankle_trans_vt_r axis=(0 1 0) LinearFunction(coefficients=1 0)
        TransformAxis translation3: coordinates=prosankle_trans_ml_r axis=(0 0 1) LinearFunction(coefficients=1 0)
    CustomJoint hip_l: socket_parent_frame=pelvis_offset socket_child_frame=femur_l_offset
      Coordinate hip_flexion_l: default_value=8.503791e-9 range=(-0.6981317 2.094395) clamped=true
      Coordinate hip_adduction_l: default_value=-5.562669e-9 range=(-0.8726646 0.5235988) clamped=true
      Coordinate hip_rotation_l: default_value=0 range=(-0.6981317 0.6981317) clamped=true
      PhysicalOffsetFrame pelvis_offset: socket_parent=/bodyset/pelvis translation=(-0.056276 -0.07849 -0.07726)
      PhysicalOffsetFrame femur_l_offset: socket_parent=/bodyset/femur_l translation=(0 0 0)
      SpatialTransform: axes_held_at_zero=(translation1 translation2 translation3)
        TransformAxis rotation1: coordinates=hip_flexion_l axis=(0 0 1) LinearFunction(coefficients=1 0)
        TransformAxis rotation2: coordinates=hip_adduction_l axis=(1 0 0) LinearFunction(coefficients=-1 0)
        TransformAxis rotation3: coordinates=hip_rotation_l axis=(0 1 0) LinearFunction(coefficients=-1 0)
    CustomJoint walker_knee_l: socket_parent_frame=femur_l_offset socket_child_frame=tibia_l_offset
      Coordinate knee_angle_l: default_value=0.0001363418 range=(0 2.0944) clamped=true
      PhysicalOffsetFrame femur_l_offset: socket_parent=/bodyset/femur_l translation=(-0.00809 -0.40796 0.00275)
          orientation=(1.64157 -1.44618 1.5708)
      PhysicalOffsetFrame tibia_l_offset: socket_parent=/bodyset/tibia_l
          translation=(-0.00808954 -0.0035348 0.00148474) orientation=(1.64157 -1.44618 1.5708)
      SpatialTransform: axes_held_at_zero=translation3
        TransformAxis rotation1: coordinates=knee_angle_l axis=(-1 0 0) LinearFunction(coefficients=1 0)
        TransformAxis rotation2: coordinates=knee_angle_l axis=(0 0 1)
          SimmSpline: x=(0 0.174533 0.349066 0.523599 0.698132 0.872665 1.0472 1.22173 1.39626 1.5708 1.74533 1.91986 2.0944)
              y=(0 0.0126809 0.0226969 0.0296054 0.0332049 0.0335354 0.0308779 0.0257548 0.0189295 0.011407 0.00443314 -0.00050475 -0.0016782)
        TransformAxis rotation3: coordinates=knee_angle_l axis=(0 1 0)
          SimmSpline: x=(0 0.174533 0.349066 0.523599 0.698132 0.872665 1.0472 1.22173 1.39626 1.5708 1.74533 1.91986 2.0944)
              y=(0 -0.059461 -0.109399 -0.150618 -0.18392 -0.210107 -0.229983 -0.24435 -0.254012 -0.25977 -0.262428 -0.262788 -0.261654)
        TransformAxis translation1: coordinates=knee_angle_l axis=(0 1 0)
          SimmSpline: x=(0 0.174533 0.349066 0.523599 0.698132 0.872665 1.0472 1.22173 1.39626 1.5708 1.74533 1.91986 2.0944)
              y=(0 0.000479 0.000835 0.001086 0.001251 0.001346 0.001391 0.001403 0.0014 0.0014 0.001421 0.001481 0.001599)
        TransformAxis translation2: coordinates=knee_angle_l axis=(0 0 1)
          SimmSpline: x=(0 0.174533 0.349066 0.523599 0.698132 0.872665 1.0472 1.22173 1.39626 1.5708 1.74533 1.91986 2.0944)
              y=(0 -0.000988 -0.001899 -0.002734 -0.003492 -0.004173 -0.004777 -0.005305 -0.005756 -0.00613 -0.006427 -0.006648 -0.006792)
    CustomJoint patellofemoral_l: socket_parent_frame=femur_l_offset socket_child_frame=patella_l_offset
      Coordinate knee_angle_l_beta: default_value=0.0001363418 range=(-99999.9 99999.9) clamped=false
      PhysicalOffsetFrame femur_l_offset: socket_parent=/bodyset/femur_l translation=(-0.00809 -0.40796 0.00275)
      PhysicalOffsetFrame patella_l_offset: socket_parent=/bodyset/patella_l translation=(0 0 0)
      SpatialTransform: axes_held_at_zero=(rotation2 rotation3)
        TransformAxis rotation1: coordinates=knee_angle_l_beta axis=(0 0 1)
          SimmSpline: x=(0 0.174533 0.349066 0.523599 0.698132 0.872665 1.0472 1.22173 1.39626 1.5708 1.74533 1.91986 2.0944)
              y=(0.00113686 -0.00629212 -0.105582 -0.253683 -0.414245 -0.579047 -0.747244 -0.91799 -1.09044 -1.26379 -1.43763 -1.61186 -1.78634)
        TransformAxis translation1: coordinates=knee_angle_l_beta axis=(1 0 0)
          SimmSpline: x=(0 0.174533 0.349066 0.523599 0.698132 0.872665 1.0472 1.22173 1.39626 1.5708 1.74533 1.91986 2.0944)
              y=(0.0524 0.0488 0.0437 0.0371 0.0296 0.0216 0.0136 0.0057 -0.0019 -0.0088 -0.0148 -0.0196 -0.0227)
        TransformAxis translation2: coordinates=knee_angle_l_beta axis=(0 1 0)
          SimmSpline: x=(0 0.174533 0.349066 0.523599 0.698132 0.872665 1.0472 1.22173 1.39626 1.5708 1.74533 1.91986 2.0944)
              y=(-0.0108 -0.019 -0.0263 -0.0322 -0.0367 -0.0395 -0.0408 -0.0404 -0.0384 -0.0349 -0.0301 -0.0245 -0.0187)
        TransformAxis translation3: axis=(0 0 1) Constant(value=-0.00275)
    PinJoint ankle_l: socket_parent_frame=tibia_l_offset socket_child_frame=talus_l_offset
      Coordinate ankle_angle_l: default_value=-3.305556e-9 range=(-0.6981317 0.5235988) clamped=true
      PhysicalOffsetFrame tibia_l_offset: socket_parent=/bodyset/tibia_l translation=(-0.01 -0.4 0)
          orientation=(-0.175895 0.105208 0.0186622)
      PhysicalOffsetFrame talus_l_offset: socket_parent=/bodyset/talus_l translation=(0 0 0)
          orientation=(-0.175895 0.105208 0.0186622)
    PinJoint subtalar_l: socket_parent_frame=talus_l_offset socket_child_frame=calcn_l_offset
      Coordinate subtalar_angle_l: default_value=0 range=(-0.3490659 0.3490659) clamped=true
      PhysicalOffsetFrame talus_l_offset: socket_parent=/bodyset/talus_l translation=(-0.04877 -0.04195 -0.00792)
          orientation=(1.76819 -0.906223 1.8196)
      PhysicalOffsetFrame calcn_l_offset: socket_parent=/bodyset/calcn_l translation=(0 0 0)
          orientation=(1.76819 -0.906223 1.8196)
    PinJoint mtp_l: socket_parent_frame=calcn_l_offset socket_child_frame=toes_l_offset
      Coordinate mtp_angle_l: default_value=0 range=(-0.5235988 0.5235988) clamped=true locked=true
      PhysicalOffsetFrame calcn_l_offset: socket_parent=/bodyset/calcn_l translation=(0.1788 -0.002 -0.00108)
          orientation=(-3.14159 -0.619901 0)
      PhysicalOffsetFrame toes_l_offset: socket_parent=/bodyset/toes_l translation=(0 0 0)
          orientation=(-3.14159 -0.619901 0)
    CustomJoint back: socket_parent_frame=pelvis_offset socket_child_frame=torso_offset
      Coordinate lumbar_extension: default_value=0 range=(-1.570796 1.570796) clamped=true
      Coordinate lumbar_bending: default_value=0 range=(-1.570796 1.570796) clamped=true
      Coordinate lumbar_rotation: default_value=0 range=(-1.570796 1.570796) clamped=true
      PhysicalOffsetFrame pelvis_offset: socket_parent=/bodyset/pelvis translation=(-0.1007 0.0815 0)
      PhysicalOffsetFrame torso_offset: socket_parent=/bodyset/torso translation=(0 0 0)
      SpatialTransform: axes_held_at_zero=(translation1 translation2 translation3)
        TransformAxis rotation1: coordinates=lumbar_extension axis=(0 0 1) LinearFunction(coefficients=1 0)
        TransformAxis rotation2: coordinates=lumbar_bending axis=(1 0 0) LinearFunction(coefficients=1 0)
        TransformAxis rotation3: coordinates=lumbar_rotation axis=(0 1 0) LinearFunction(coefficients=1 0)
    CustomJoint acromial_r: socket_parent_frame=torso_offset socket_child_frame=humerus_r_offset
      Coordinate arm_flex_r: default_value=0 range=(-1.570796 1.570796) clamped=true
      Coordinate arm_add_r: default_value=-1.643261e-9 range=(-2.094395 1.570796) clamped=true
      Coordinate arm_rot_r: default_value=0 range=(-2.5 2.5) clamped=true
      PhysicalOffsetFrame torso_offset: socket_parent=/bodyset/torso translation=(0.003155 0.3715 0.17)
      PhysicalOffsetFrame humerus_r_offset: socket_parent=/bodyset/humerus_r translation=(0 0 0)
      SpatialTransform: axes_held_at_zero=(translation1 translation2 translation3)
        TransformAxis rotation1: coordinates=arm_flex_r axis=(0 0 1) LinearFunction(coefficients=1 0)
        TransformAxis rotation2: coordinates=arm_add_r axis=(1 0 0) LinearFunction(coefficients=1 0)
        TransformAxis rotation3: coordinates=arm_rot_r axis=(0 1 0) LinearFunction(coefficients=1 0)
    PinJoint elbow_r: socket_parent_frame=humerus_r_offset socket_child_frame=ulna_r_offset
      Coordinate elbow_flex_r: default_value=0.0001363409 range=(0 2.618) clamped=true
      PhysicalOffsetFrame humerus_r_offset: socket_parent=/bodyset/humerus_r translation=(0.013144 -0.286273 -0.009595)
          orientation=(-0.0228627 0.228018 0.0051689)
      PhysicalOffsetFrame ulna_r_offset: socket_parent=/bodyset/ulna_r translation=(0 0 0)
          orientation=(-0.0228627 0.228018 0.0051689)
    PinJoint radioulnar_r: socket_parent_frame=ulna_r_offset socket_child_frame=radius_r_offset
      Coordinate pro_sup_r: default_value=0.0001363413 range=(0 3.14) clamped=true
      PhysicalOffsetFrame ulna_r_offset: socket_parent=/bodyset/ulna_r translation=(-0.006727 -0.013007 0.026083)
          orientation=(-1.56884 0.056428 1.53614)
      PhysicalOffsetFrame radius_r_offset: socket_parent=/bodyset/radius_r translation=(0 0 0)
          orientation=(-1.56884 0.056428 1.53614)
    UniversalJoint radius_hand_r: socket_parent_frame=radius_r_offset socket_child_frame=hand_r_offset
      Coordinate wrist_flex_r: default_value=0 range=(-1.22173 1.22173) clamped=true locked=true
      Coordinate wrist_dev_r: default_value=0 range=(-0.4363323 0.6108652) clamped=true locked=true
      PhysicalOffsetFrame radius_r_offset: socket_parent=/bodyset/radius_r translation=(-0.008797 -0.235841 0.01361)
          orientation=(-1.5708 0 -1.5708)
      PhysicalOffsetFrame hand_r_offset: socket_parent=/bodyset/hand_r translation=(0 0 0)
          orientation=(-1.5708 0 -1.5708)
    CustomJoint acromial_l: socket_parent_frame=torso_offset socket_child_frame=humerus_l_offset
      Coordinate arm_flex_l: default_value=0 range=(-1.570796 1.570796) clamped=true
      Coordinate arm_add_l: default_value=-1.643261e-9 range=(-2.094395 1.570796) clamped=true
      Coordinate arm_rot_l: default_value=0 range=(-2.5 2.5) clamped=true
      PhysicalOffsetFrame torso_offset: socket_parent=/bodyset/torso translation=(0.003155 0.3715 -0.17)
      PhysicalOffsetFrame humerus_l_offset: socket_parent=/bodyset/humerus_l translation=(0 0 0)
      SpatialTransform: axes_held_at_zero=(translation1 translation2 translation3)
        TransformAxis rotation1: coordinates=arm_flex_l axis=(0 0 1) LinearFunction(coefficients=1 0)
        TransformAxis rotation2: coordinates=arm_add_l axis=(-1 0 0) LinearFunction(coefficients=1 0)
        TransformAxis rotation3: coordinates=arm_rot_l axis=(0 -1 0) LinearFunction(coefficients=1 0)
    PinJoint elbow_l: socket_parent_frame=humerus_l_offset socket_child_frame=ulna_l_offset
      Coordinate elbow_flex_l: default_value=0.0001363409 range=(0 2.618) clamped=true
      PhysicalOffsetFrame humerus_l_offset: socket_parent=/bodyset/humerus_l translation=(0.013144 -0.286273 0.009595)
          orientation=(0.0228627 -0.228018 0.0051689)
      PhysicalOffsetFrame ulna_l_offset: socket_parent=/bodyset/ulna_l translation=(0 0 0)
          orientation=(0.0228627 -0.228018 0.0051689)
    PinJoint radioulnar_l: socket_parent_frame=ulna_l_offset socket_child_frame=radius_l_offset
      Coordinate pro_sup_l: default_value=0.0001363413 range=(0 3.14) clamped=true
      PhysicalOffsetFrame ulna_l_offset: socket_parent=/bodyset/ulna_l translation=(-0.006727 -0.013007 -0.026083)
          orientation=(1.56884 -0.056428 1.53614)
      PhysicalOffsetFrame radius_l_offset: socket_parent=/bodyset/radius_l translation=(0 0 0)
          orientation=(1.56884 -0.056428 1.53614)
    UniversalJoint radius_hand_l: socket_parent_frame=radius_l_offset socket_child_frame=hand_l_offset
      Coordinate wrist_flex_l: default_value=0 range=(-1.22173 1.22173) clamped=true locked=true
      Coordinate wrist_dev_l: default_value=0 range=(-0.4363323 0.6108652) clamped=true locked=true
      PhysicalOffsetFrame radius_l_offset: socket_parent=/bodyset/radius_l translation=(-0.008797 -0.235841 -0.01361)
          orientation=(1.5708 0 1.5708)
      PhysicalOffsetFrame hand_l_offset: socket_parent=/bodyset/hand_l translation=(0 0 0)
          orientation=(1.5708 0 1.5708)
  ConstraintSet:
    CoordinateCouplerConstraint patellofemoral_knee_angle_l_con: independent_coordinate_names=knee_angle_l
        dependent_coordinate_name=knee_angle_l_beta scale_factor=1
        coupled_coordinates_function=LinearFunction(coefficients=1 0)
  ForceSet:
    Millard2012EquilibriumMuscle [values shared by the 65 below unless stated]: fiber_damping=0.01
        default_activation=0.01 minimum_activation=0.01
      ActiveForceLengthCurve: min_norm_active_fiber_length=0.25 transition_norm_fiber_length=0.77
          max_norm_active_fiber_length=1.9 shallow_ascending_slope=0.75 minimum_value=0
      ForceVelocityCurve: concentric_slope_at_vmax=0 concentric_slope_near_vmax=0.25 isometric_slope=5
          eccentric_slope_at_vmax=0 eccentric_slope_near_vmax=0.15 max_eccentric_velocity_force_multiplier=1.4
      FiberForceLengthCurve: strain_at_zero_force=0 strain_at_one_norm_force=0.7
      TendonForceLengthCurve
    Millard2012EquilibriumMuscle addbrev_r: max_isometric_force=625.8197 optimal_fiber_length=0.1031
        tendon_slack_length=0.03545029 pennation_angle_at_optimal=0.1147809 [radians] ignore_tendon_compliance=true
      PathPoint P1: pelvis (-0.0191 -0.094 0.0154)
      PathPoint P2: femur_r (-0.002 -0.118 0.0249)
      PathWrap: wrap_object=AB_at_femshaft_r method=hybrid
    Millard2012EquilibriumMuscle addlong_r: max_isometric_force=916.8 optimal_fiber_length=0.1082
        tendon_slack_length=0.1320579 pennation_angle_at_optimal=0.1377704
      PathPoint P1: pelvis (-0.00758 -0.0889 0.01888)
      PathPoint P2: femur_r (0.025061 -0.200971 0.011189)
      PathWrap: wrap_object=AL_at_femshaft_r method=hybrid
    Millard2012EquilibriumMuscle addmagDist_r: max_isometric_force=597.2951 optimal_fiber_length=0.1772
        tendon_slack_length=0.0873807 pennation_angle_at_optimal=0.194705 ignore_tendon_compliance=true
      PathPoint P1: pelvis (-0.07404 -0.12767 0.03982)
      PathPoint P2: femur_r (0.025061 -0.200971 0.011189)
    Millard2012EquilibriumMuscle addmagIsch_r: max_isometric_force=597.2951 optimal_fiber_length=0.1562
        tendon_slack_length=0.1460191 pennation_angle_at_optimal=0.1680443 ignore_tendon_compliance=true
      PathPoint P1: pelvis (-0.08962 -0.12976 0.04171)
      PathPoint P2: femur_r (0.025061 -0.200971 0.011189)
    Millard2012EquilibriumMuscle addmagMid_r: max_isometric_force=597.2951 optimal_fiber_length=0.1377
        tendon_slack_length=0.0466277 pennation_angle_at_optimal=0.2073076 ignore_tendon_compliance=true
      PathPoint P1: pelvis (-0.05266 -0.12075 0.02854)
      PathPoint P2: femur_r (0.00242 -0.1624 0.02922)
      PathWrap: wrap_object=AMmid_at_femshaft_r method=hybrid
    Millard2012EquilibriumMuscle addmagProx_r: max_isometric_force=597.2951 optimal_fiber_length=0.1056
        tendon_slack_length=0.0403241 pennation_angle_at_optimal=0.3114833 ignore_tendon_compliance=true
      PathPoint P1: pelvis (-0.03098 -0.10755 0.01365)
      PathPoint P2: femur_r (-0.01527 -0.07886 0.03202)
      PathWrap: wrap_object=AMprox_at_femshaft_r method=hybrid
    Millard2012EquilibriumMuscle bflh_r: max_isometric_force=1313.184 optimal_fiber_length=0.0976
        tendon_slack_length=0.1652949 pennation_angle_at_optimal=0.1759182
      PathPoint P1: pelvis (-0.104 -0.1191 0.0586)
      PathPoint P2: femur_r (0.004256 -0.200971 0.027537)
    Millard2012EquilibriumMuscle glmax1_r: max_isometric_force=983.7836 optimal_fiber_length=0.147
        tendon_slack_length=0.04884089 pennation_angle_at_optimal=0.3540118 ignore_tendon_compliance=true
      PathPoint P1: pelvis (-0.1231 0.0345 0.0563)
      PathPoint P2: pelvis (-0.1257 -0.0242 0.0779)
      PathPoint P3: femur_r (-0.0444 -0.0326 0.0302)
      PathPoint P4: femur_r (-0.0277 -0.0566 0.047)
      PathWrap: wrap_object=Gmax1_at_pelvis_r method=hybrid
    Millard2012EquilibriumMuscle glmax2_r: max_isometric_force=1406.046 optimal_fiber_length=0.157
        tendon_slack_length=0.06788715 pennation_angle_at_optimal=0.3673821 ignore_tendon_compliance=true
      PathPoint P1: pelvis (-0.1317 0.0087 0.0462)
      PathPoint P2: pelvis (-0.1344 -0.0609 0.0813)
      PathPoint P3: femur_r (-0.045 -0.0584 0.0252)
      PathPoint P4: femur_r (-0.0156 -0.1016 0.0419)
      PathWrap: wrap_object=Gmax2_at_pelvis_r method=hybrid
    Millard2012EquilibriumMuscle glmax3_r: max_isometric_force=947.7541 optimal_fiber_length=0.167
        tendon_slack_length=0.06971661 pennation_angle_at_optimal=0.3824161 ignore_tendon_compliance=true
      PathPoint P1: pelvis (-0.13 -0.0525 0.009)
      PathPoint P2: pelvis (-0.1273 -0.1263 0.0435)
      PathPoint P3: femur_r (-0.0281 -0.1125 0.0094)
      PathPoint P4: femur_r (-0.006 -0.1419 0.0411)
      PathWrap: wrap_object=Gmax3_at_pelvis_r method=hybrid
    Millard2012EquilibriumMuscle glmed1_r: max_isometric_force=1093.467 optimal_fiber_length=0.073
        tendon_slack_length=0.05581683 pennation_angle_at_optimal=0.3165559 ignore_tendon_compliance=true
      PathPoint P1: pelvis (-0.0445 0.0245 0.1172)
      PathPoint P2: femur_r (-0.0218 -0.0117 0.0555)
    Millard2012EquilibriumMuscle glmed2_r: max_isometric_force=765.0917 optimal_fiber_length=0.073
        tendon_slack_length=0.06524881 pennation_angle_at_optimal=0.3165559 ignore_tendon_compliance=true
      PathPoint P1: pelvis (-0.085 0.0316 0.0675)
      PathPoint P2: femur_r (-0.0258 -0.0058 0.0527)
    Millard2012EquilibriumMuscle glmed3_r: max_isometric_force=871.1993 optimal_fiber_length=0.073
        tendon_slack_length=0.04523284 pennation_angle_at_optimal=0.3165559 ignore_tendon_compliance=true
      PathPoint P1: pelvis (-0.1152 -0.0073 0.0526)
      PathPoint P2: femur_r (-0.0309 -0.0047 0.0518)
    Millard2012EquilibriumMuscle glmin1_r: max_isometric_force=374.0459 optimal_fiber_length=0.068
        tendon_slack_length=0.01613778 pennation_angle_at_optimal=0.1745329 ignore_tendon_compliance=true
      PathPoint P1: pelvis (-0.0464 -0.0149 0.1042)
      PathPoint P2: femur_r (-0.0072 -0.0104 0.056)
    Millard2012EquilibriumMuscle glmin2_r: max_isometric_force=394.8197 optimal_fiber_length=0.056
        tendon_slack_length=0.02609905 pennation_angle_at_optimal=0 ignore_tendon_compliance=true
      PathPoint P1: pelvis (-0.0616 -0.0142 0.0971)
      PathPoint P2: femur_r (-0.0096 -0.0104 0.056)
    Millard2012EquilibriumMuscle glmin3_r: max_isometric_force=446.7738 optimal_fiber_length=0.038
        tendon_slack_length=0.0508725 pennation_angle_at_optimal=0.01745329
      PathPoint P1: pelvis (-0.0789 -0.0155 0.0798)
      PathPoint P2: femur_r (-0.0135 -0.0083 0.055)
    Millard2012EquilibriumMuscle grac_r: max_isometric_force=281.3115 optimal_fiber_length=0.2278
        tendon_slack_length=0.1320589 pennation_angle_at_optimal=0.1720016 ignore_tendon_compliance=true
      PathPoint P1: pelvis (-0.04736 -0.12932 0.02456)
      PathPoint P2: femur_r (0.03664 -0.200971 0.023499)
    Millard2012EquilibriumMuscle iliacus_r: max_isometric_force=1021.141 optimal_fiber_length=0.1066
        tendon_slack_length=0.09612071 pennation_angle_at_optimal=0.279914 ignore_tendon_compliance=true
      PathPoint P1: pelvis (-0.0605 0.0309 0.0843)
      PathPoint P2: pelvis (-0.0135 -0.0557 0.0756)
      PathPoint P3: femur_r (-0.0023 -0.0565 0.0139)
      PathPoint P4: femur_r (-0.0122 -0.0637 0.0196)
      PathWrap: wrap_object=IL_at_brim_r method=hybrid range=(2 3)
    Millard2012EquilibriumMuscle piri_r: max_isometric_force=1029.787 optimal_fiber_length=0.026
        tendon_slack_length=0.1149062 pennation_angle_at_optimal=0.1745329
      PathPoint P1: pelvis (-0.10181 -0.00653 0.01351)
      PathPoint P2: pelvis (-0.10202 -0.03066 0.06092)
      PathPoint P3: femur_r (-0.0148 -0.0036 0.0437)
    Millard2012EquilibriumMuscle psoas_r: max_isometric_force=1426.79 optimal_fiber_length=0.1169
        tendon_slack_length=0.09954317 pennation_angle_at_optimal=0.2155251 ignore_tendon_compliance=true
      PathPoint P1: pelvis (-0.0606 0.062 0.039)
      PathPoint P2: pelvis (-0.0205 -0.0654 0.0656)
      PathPoint P3: femur_r (-0.0132 -0.0467 0.0046)
      PathPoint P4: femur_r (-0.0235 -0.0524 0.0088)
      PathWrap: wrap_object=PS_at_brim_r method=hybrid range=(2 3)
    Millard2012EquilibriumMuscle recfem_r: max_isometric_force=2191.741 optimal_fiber_length=0.0759
        tendon_slack_length=0.2262904 pennation_angle_at_optimal=0.2170149
      PathPoint P1: pelvis (-0.024 -0.0388 0.0933)
      PathPoint P2: femur_r (0.03664 -0.200971 0.023499)
    Millard2012EquilibriumMuscle sart_r: max_isometric_force=249.4131 optimal_fiber_length=0.403
        tendon_slack_length=0.1241006 pennation_angle_at_optimal=0.02613542 ignore_tendon_compliance=true
      PathPoint P1: pelvis (-0.0195 -0.0156 0.1056)
      PathPoint P2: femur_r (0.03664 -0.200971 0.023499)
    Millard2012EquilibriumMuscle semimem_r: max_isometric_force=2200.987 optimal_fiber_length=0.069
        tendon_slack_length=0.347586 pennation_angle_at_optimal=0.2545615
      PathPoint P1: pelvis (-0.0987 -0.114 0.0614)
      PathPoint P2: femur_r (0.004256 -0.202815 0.027537)
    Millard2012EquilibriumMuscle semiten_r: max_isometric_force=591.2951 optimal_fiber_length=0.193
        tendon_slack_length=0.1654021 pennation_angle_at_optimal=0.241295
      PathPoint P1: pelvis (-0.1038 -0.1253 0.0515)
      PathPoint P2: femur_r (0.004256 -0.200971 0.027537)
    Millard2012EquilibriumMuscle tfl_r: max_isometric_force=411.2066 optimal_fiber_length=0.095
        tendon_slack_length=0.2744304 pennation_angle_at_optimal=0.05235988
      PathPoint P1: pelvis (-0.0311 0.0214 0.1241)
      PathPoint P2: femur_r (0.0294 -0.0995 0.0597)
      PathPoint tfl_l-P3: femur_r (0.02189899 -0.200971 0.04139921)
    Millard2012EquilibriumMuscle addbrev_l: max_isometric_force=625.8197 optimal_fiber_length=0.1031
        tendon_slack_length=0.03545029 pennation_angle_at_optimal=0.1147809 ignore_tendon_compliance=true
      PathPoint P1: pelvis (-0.0191 -0.094 -0.0154)
      PathPoint P2: femur_l (-0.002 -0.118 -0.0249)
      PathWrap: wrap_object=AB_at_femshaft_l method=hybrid
    Millard2012EquilibriumMuscle addlong_l: max_isometric_force=916.8 optimal_fiber_length=0.1082
        tendon_slack_length=0.1317994 pennation_angle_at_optimal=0.1377704
      PathPoint P1: pelvis (-0.00758 -0.0889 -0.01888)
      PathPoint P2: femur_l (0.01126 -0.23937 -0.01583)
      PathWrap: wrap_object=AL_at_femshaft_l method=hybrid
    Millard2012EquilibriumMuscle addmagDist_l: max_isometric_force=597.2951 optimal_fiber_length=0.1772
        tendon_slack_length=0.0873807 pennation_angle_at_optimal=0.194705 ignore_tendon_compliance=true
      PathPoint P1: pelvis (-0.07404 -0.12767 -0.03982)
      PathPoint P2: femur_l (0.01125 -0.2625 -0.0193)
      PathWrap: wrap_object=AMdist_at_femshaft_l method=hybrid
    Millard2012EquilibriumMuscle addmagIsch_l: max_isometric_force=597.2951 optimal_fiber_length=0.1562
        tendon_slack_length=0.216343 pennation_angle_at_optimal=0.1680443
      PathPoint P1: pelvis (-0.08962 -0.12976 -0.04171)
      PathPoint P2: femur_l (0.00481 -0.38797 0.03273)
      PathWrap: wrap_object=AMisch_at_condyles_l method=hybrid
    Millard2012EquilibriumMuscle addmagMid_l: max_isometric_force=597.2951 optimal_fiber_length=0.1377
        tendon_slack_length=0.0466277 pennation_angle_at_optimal=0.2073076 ignore_tendon_compliance=true
      PathPoint P1: pelvis (-0.05266 -0.12075 -0.02854)
      PathPoint P2: femur_l (0.00242 -0.1624 -0.02922)
      PathWrap: wrap_object=AMmid_at_femshaft_l method=hybrid
    Millard2012EquilibriumMuscle addmagProx_l: max_isometric_force=597.2951 optimal_fiber_length=0.1056
        tendon_slack_length=0.0403241 pennation_angle_at_optimal=0.3114833 ignore_tendon_compliance=true
      PathPoint P1: pelvis (-0.03098 -0.10755 -0.01365)
      PathPoint P2: femur_l (-0.01527 -0.07886 -0.03202)
      PathWrap: wrap_object=AMprox_at_femshaft_l method=hybrid
    Millard2012EquilibriumMuscle bflh_l: max_isometric_force=1313.184 optimal_fiber_length=0.0976
        tendon_slack_length=0.3252266 pennation_angle_at_optimal=0.1759182
      PathPoint P1: pelvis (-0.104 -0.1191 -0.0586)
      PathPoint P2: tibia_l (-0.0337 -0.035 -0.0253)
      PathPoint P3: tibia_l (-0.0287 -0.0455 -0.0303)
    Millard2012EquilibriumMuscle bfsh_l: max_isometric_force=557.1148 optimal_fiber_length=0.1103
        tendon_slack_length=0.1058172 pennation_angle_at_optimal=0.2642232 ignore_tendon_compliance=true
      PathPoint P1: femur_l (0.005 -0.2111 -0.0234)
      PathPoint P2: tibia_l (-0.0301 -0.0419 -0.0318)
      PathWrap: wrap_object=BF_at_gastroc_l method=hybrid
    Millard2012EquilibriumMuscle edl_l: max_isometric_force=603.4982 optimal_fiber_length=0.0693
        tendon_slack_length=0.3688752 pennation_angle_at_optimal=0.2182582
      PathPoint P1: tibia_l (-0.016 -0.1157 -0.0205)
      PathPoint P2: tibia_l (0.0164 -0.376 -0.0112)
      PathPoint P3: calcn_l (0.0919 0.036 -0.0008)
      PathPoint P4: calcn_l (0.1616 0.0055 -0.013)
      PathPoint P5: toes_l (0.0003 0.0047 -0.0153)
      PathPoint P6: toes_l (0.0443 -0.0004 -0.025)
    Millard2012EquilibriumMuscle ehl_l: max_isometric_force=285.8675 optimal_fiber_length=0.0748
        tendon_slack_length=0.3267953 pennation_angle_at_optimal=0.1972681
      PathPoint P1: tibia_l (-0.014 -0.155 -0.0189)
      PathPoint P2: tibia_l (0.0071 -0.2909 -0.0164)
      PathPoint P3: tibia_l (0.02 -0.3693 0.0028)
      PathPoint P4: calcn_l (0.097 0.0389 0.0211)
      PathPoint P5: calcn_l (0.1293 0.0309 0.0257)
      PathPoint P6: calcn_l (0.1734 0.0139 0.028)
      PathPoint P7: toes_l (0.0298 0.0041 0.0245)
      PathPoint P8: toes_l (0.0563 0.0034 0.0186)
    Millard2012EquilibriumMuscle fdl_l: max_isometric_force=423.177 optimal_fiber_length=0.0446
        tendon_slack_length=0.3787729 pennation_angle_at_optimal=0.2248391
      PathPoint P1: tibia_l (-0.0023 -0.1832 0.0018)
      PathPoint P2: tibia_l (-0.0176 -0.3645 0.0124)
      PathPoint P3: calcn_l (0.0436 0.0315 0.028)
      PathPoint P4: calcn_l (0.0708 0.0176 0.0263)
      PathPoint P5: calcn_l (0.1658 -0.0081 -0.0116)
      PathPoint P6: toes_l (-0.0019 -0.0078 -0.0147)
      PathPoint P7: toes_l (0.0285 -0.0071 -0.0215)
      PathPoint P8: toes_l (0.0441 -0.006 -0.0242)
    Millard2012EquilibriumMuscle fhl_l: max_isometric_force=907.8393 optimal_fiber_length=0.0527
        tendon_slack_length=0.3543397 pennation_angle_at_optimal=0.2580255
      PathPoint P1: tibia_l (-0.031 -0.2163 -0.02)
      PathPoint P2: tibia_l (-0.0242 -0.3671 0.0076)
      PathPoint P3: calcn_l (0.0374 0.0276 0.0241)
      PathPoint P4: calcn_l (0.1038 0.0068 0.0256)
      PathPoint P5: calcn_l (0.1726 -0.0053 0.0269)
      PathPoint P6: toes_l (0.0155 -0.0064 0.0265)
      PathPoint P7: toes_l (0.0562 -0.0102 0.0181)
    Millard2012EquilibriumMuscle gaslat_l: max_isometric_force=1575.059 optimal_fiber_length=0.0588
        tendon_slack_length=0.3760702 pennation_angle_at_optimal=0.2102268
      PathPoint P1: femur_l (-0.003 -0.3814 -0.0277)
      PathPoint P2: calcn_l (0.0044 0.031 0.0053)
      PathWrap shank: wrap_object=GasLat_at_shank_l method=hybrid
      PathWrap condyles: wrap_object=Gastroc_at_condyles_l method=hybrid
    Millard2012EquilibriumMuscle gasmed_l: max_isometric_force=3115.515 optimal_fiber_length=0.051
        tendon_slack_length=0.3987163 pennation_angle_at_optimal=0.1656816
      PathPoint P1: femur_l (0.008 -0.3788 0.0208)
      PathPoint P2: calcn_l (0.0044 0.031 0.0053)
      PathWrap shank: wrap_object=GasMed_at_shank_l method=hybrid
      PathWrap condyles: wrap_object=Gastroc_at_condyles_l method=hybrid
    Millard2012EquilibriumMuscle glmax1_l: max_isometric_force=983.7836 optimal_fiber_length=0.147
        tendon_slack_length=0.04884089 pennation_angle_at_optimal=0.3540118 ignore_tendon_compliance=true
      PathPoint P1: pelvis (-0.1231 0.0345 -0.0563)
      PathPoint P2: pelvis (-0.1257 -0.0242 -0.0779)
      PathPoint P3: femur_l (-0.0444 -0.0326 -0.0302)
      PathPoint P4: femur_l (-0.0277 -0.0566 -0.047)
      PathWrap: wrap_object=Gmax1_at_pelvis_l method=hybrid
    Millard2012EquilibriumMuscle glmax2_l: max_isometric_force=1406.046 optimal_fiber_length=0.157
        tendon_slack_length=0.06788715 pennation_angle_at_optimal=0.3673821 ignore_tendon_compliance=true
      PathPoint P1: pelvis (-0.1317 0.0087 -0.0462)
      PathPoint P2: pelvis (-0.1344 -0.0609 -0.0813)
      PathPoint P3: femur_l (-0.045 -0.0584 -0.0252)
      PathPoint P4: femur_l (-0.0156 -0.1016 -0.0419)
      PathWrap: wrap_object=Gmax2_at_pelvis_l method=hybrid
    Millard2012EquilibriumMuscle glmax3_l: max_isometric_force=947.7541 optimal_fiber_length=0.167
        tendon_slack_length=0.06971661 pennation_angle_at_optimal=0.3824161 ignore_tendon_compliance=true
      PathPoint P1: pelvis (-0.13 -0.0525 -0.009)
      PathPoint P2: pelvis (-0.1273 -0.1263 -0.0435)
      PathPoint P3: femur_l (-0.0281 -0.1125 -0.0094)
      PathPoint P4: femur_l (-0.006 -0.1419 -0.0411)
      PathWrap: wrap_object=Gmax3_at_pelvis_l method=hybrid
    Millard2012EquilibriumMuscle glmed1_l: max_isometric_force=1093.467 optimal_fiber_length=0.073
        tendon_slack_length=0.05581683 pennation_angle_at_optimal=0.3165559 ignore_tendon_compliance=true
      PathPoint P1: pelvis (-0.0445 0.0245 -0.1172)
      PathPoint P2: femur_l (-0.0218 -0.0117 -0.0555)
    Millard2012EquilibriumMuscle glmed2_l: max_isometric_force=765.0917 optimal_fiber_length=0.073
        tendon_slack_length=0.06524881 pennation_angle_at_optimal=0.3165559 ignore_tendon_compliance=true
      PathPoint P1: pelvis (-0.085 0.0316 -0.0675)
      PathPoint P2: femur_l (-0.0258 -0.0058 -0.0527)
    Millard2012EquilibriumMuscle glmed3_l: max_isometric_force=871.1993 optimal_fiber_length=0.073
        tendon_slack_length=0.04523284 pennation_angle_at_optimal=0.3165559 ignore_tendon_compliance=true
      PathPoint P1: pelvis (-0.1152 -0.0073 -0.0526)
      PathPoint P2: femur_l (-0.0309 -0.0047 -0.0518)
    Millard2012EquilibriumMuscle glmin1_l: max_isometric_force=374.0459 optimal_fiber_length=0.068
        tendon_slack_length=0.01613778 pennation_angle_at_optimal=0.1745329 ignore_tendon_compliance=true
      PathPoint P1: pelvis (-0.0464 -0.0149 -0.1042)
      PathPoint P2: femur_l (-0.0072 -0.0104 -0.056)
    Millard2012EquilibriumMuscle glmin2_l: max_isometric_force=394.8197 optimal_fiber_length=0.056
        tendon_slack_length=0.02609905 pennation_angle_at_optimal=0 ignore_tendon_compliance=true
      PathPoint P1: pelvis (-0.0616 -0.0142 -0.0971)
      PathPoint P2: femur_l (-0.0096 -0.0104 -0.056)
    Millard2012EquilibriumMuscle glmin3_l: max_isometric_force=446.7738 optimal_fiber_length=0.038
        tendon_slack_length=0.0508725 pennation_angle_at_optimal=0.01745329
      PathPoint P1: pelvis (-0.0789 -0.0155 -0.0798)
      PathPoint P2: femur_l (-0.0135 -0.0083 -0.055)
    Millard2012EquilibriumMuscle grac_l: max_isometric_force=281.3115 optimal_fiber_length=0.2278
        tendon_slack_length=0.1720138 pennation_angle_at_optimal=0.1720016 ignore_tendon_compliance=true
      PathPoint P1: pelvis (-0.04736 -0.12932 -0.02456)
      PathPoint P2: tibia_l (-0.01842 -0.04755 0.02961)
      PathPoint P3: tibia_l (0.00178 -0.06962 0.01573)
      PathWrap: wrap_object=GR_at_condyles_l method=hybrid
    Millard2012EquilibriumMuscle iliacus_l: max_isometric_force=1021.141 optimal_fiber_length=0.1066
        tendon_slack_length=0.09612071 pennation_angle_at_optimal=0.279914 ignore_tendon_compliance=true
      PathPoint P1: pelvis (-0.0605 0.0309 -0.0843)
      PathPoint P2: pelvis (-0.0135 -0.0557 -0.0756)
      PathPoint P3: femur_l (-0.0023 -0.0565 -0.0139)
      PathPoint P4: femur_l (-0.0122 -0.0637 -0.0196)
      PathWrap: wrap_object=IL_at_brim_l method=hybrid range=(2 3)
    Millard2012EquilibriumMuscle perbrev_l: max_isometric_force=521.2016 optimal_fiber_length=0.0454
        tendon_slack_length=0.1475275 pennation_angle_at_optimal=0.2052361
      PathPoint P1: tibia_l (-0.0243 -0.2532 -0.0251)
      PathPoint P2: tibia_l (-0.0339 -0.3893 -0.0249)
      PathPoint P3: tibia_l (-0.0285 -0.4004 -0.0255)
      PathPoint P4: calcn_l (0.0471 0.027 -0.0233)
      PathPoint P5: calcn_l (0.0677 0.0219 -0.0343)
    Millard2012EquilibriumMuscle perlong_l: max_isometric_force=1115.371 optimal_fiber_length=0.0508
        tendon_slack_length=0.3322208 pennation_angle_at_optimal=0.2479525
      PathPoint P1: tibia_l (-0.02 -0.1373 -0.0282)
      PathPoint P2: tibia_l (-0.0317 -0.39 -0.0237)
      PathPoint P3: tibia_l (-0.0272 -0.4014 -0.024)
      PathPoint P4: calcn_l (0.0438 0.023 -0.0221)
      PathPoint P5: calcn_l (0.0681 0.0106 -0.0284)
      PathPoint P6: calcn_l (0.0852 0.0069 -0.0118)
      PathPoint P7: calcn_l (0.1203 0.0085 0.0184)
    Millard2012EquilibriumMuscle piri_l: max_isometric_force=1029.787 optimal_fiber_length=0.026
        tendon_slack_length=0.1149062 pennation_angle_at_optimal=0.1745329
      PathPoint P1: pelvis (-0.10181 -0.00653 -0.01351)
      PathPoint P2: pelvis (-0.10202 -0.03066 -0.06092)
      PathPoint P3: femur_l (-0.0148 -0.0036 -0.0437)
    Millard2012EquilibriumMuscle psoas_l: max_isometric_force=1426.79 optimal_fiber_length=0.1169
        tendon_slack_length=0.09954317 pennation_angle_at_optimal=0.2155251 ignore_tendon_compliance=true
      PathPoint P1: pelvis (-0.0606 0.062 -0.039)
      PathPoint P2: pelvis (-0.0205 -0.0654 -0.0656)
      PathPoint P3: femur_l (-0.0132 -0.0467 -0.0046)
      PathPoint P4: femur_l (-0.0235 -0.0524 -0.0088)
      PathWrap: wrap_object=PS_at_brim_l method=hybrid range=(2 3)
    Millard2012EquilibriumMuscle recfem_l: max_isometric_force=2191.741 optimal_fiber_length=0.0759
        tendon_slack_length=0.4484935 pennation_angle_at_optimal=0.2170149
      PathPoint P1: pelvis (-0.024 -0.0388 -0.0933)
      PathPoint P2: patella_l (0.01 0.049 -0.0007)
      PathPoint P3: patella_l (0.0121 0.0437 0.001)
      PathPoint P4: patella_l (0.005 0.00247 -3e-5)
      PathPoint P5: tibia_l (0.0326 -0.06312 0.00047)
      PathWrap: wrap_object=KnExt_at_fem_l method=hybrid
    Millard2012EquilibriumMuscle sart_l: max_isometric_force=249.4131 optimal_fiber_length=0.403
        tendon_slack_length=0.1239998 pennation_angle_at_optimal=0.02613542 ignore_tendon_compliance=true
      PathPoint P1: pelvis (-0.0195 -0.0156 -0.1056)
      PathPoint P2: femur_l (-0.003 -0.3568 0.0421)
      PathPoint P3: tibia_l (-0.0251 -0.0401 0.0365)
      PathPoint P4: tibia_l (-0.0159 -0.0599 0.0264)
      PathPoint P5: tibia_l (0.0136 -0.081 0.0026)
    Millard2012EquilibriumMuscle semimem_l: max_isometric_force=2200.987 optimal_fiber_length=0.069
        tendon_slack_length=0.1842139 pennation_angle_at_optimal=0.2545615
      PathPoint P1: pelvis (-0.0987 -0.114 -0.0614)
      PathPoint P2: tibia_l (-0.029 -0.0417 0.0196)
      PathWrap: wrap_object=SM_at_condyles_l method=hybrid
    Millard2012EquilibriumMuscle semiten_l: max_isometric_force=591.2951 optimal_fiber_length=0.193
        tendon_slack_length=0.2471989 pennation_angle_at_optimal=0.241295
      PathPoint P1: pelvis (-0.1038 -0.1253 -0.0515)
      PathPoint P2: tibia_l (-0.0312 -0.0508 0.0229)
      PathPoint P3: tibia_l (0.0019 -0.0773 0.0117)
      PathWrap: wrap_object=ST_at_condyles_l method=hybrid
    Millard2012EquilibriumMuscle soleus_l: max_isometric_force=6194.843 optimal_fiber_length=0.044
        tendon_slack_length=0.2767559 pennation_angle_at_optimal=0.3814289
      PathPoint P1: tibia_l (-0.0076 -0.0916 -0.0098)
      PathPoint P2: calcn_l (0.0044 0.031 0.0053)
    Millard2012EquilibriumMuscle tfl_l: max_isometric_force=411.2066 optimal_fiber_length=0.095
        tendon_slack_length=0.4494971 pennation_angle_at_optimal=0.05235988
      PathPoint P1: pelvis (-0.0311 0.0214 -0.1241)
      PathPoint P2: femur_l (0.0294 -0.0995 -0.0597)
      PathPoint P3: femur_l (0.0107 -0.405 -0.0324)
      PathPoint P4: tibia_l (0.0108 -0.041 -0.0346)
    Millard2012EquilibriumMuscle tibant_l: max_isometric_force=1227.452 optimal_fiber_length=0.0683
        tendon_slack_length=0.240461 pennation_angle_at_optimal=0.1951828
      PathPoint P1: tibia_l (0.0154 -0.1312 -0.0162)
      PathPoint P2: tibia_l (0.0251 -0.1906 -0.0128)
      PathPoint P3: tibia_l (0.0233 -0.3659 0.0132)
      PathPoint P4: calcn_l (0.1166 0.0178 0.0305)
    Millard2012EquilibriumMuscle tibpost_l: max_isometric_force=1730.154 optimal_fiber_length=0.0378
        tendon_slack_length=0.2807796 pennation_angle_at_optimal=0.2264891
      PathPoint P1: tibia_l (-0.0041 -0.1304 -0.0103)
      PathPoint P2: tibia_l (-0.0164 -0.3655 0.0175)
      PathPoint P3: calcn_l (0.0417 0.0334 0.0286)
      PathPoint P4: calcn_l (0.0772 0.0159 0.0281)
    Millard2012EquilibriumMuscle vasint_l: max_isometric_force=1697.361 optimal_fiber_length=0.0993
        tendon_slack_length=0.2022107 pennation_angle_at_optimal=0.06309973
      PathPoint P1: femur_l (0.029 -0.1924 -0.031)
      PathPoint P2: femur_l (0.0335 -0.2084 -0.0285)
      PathPoint P3: patella_l (0.0058 0.048 0.0006)
      PathPoint P4: patella_l (0.005 0.00247 0.00039)
      PathPoint P5: tibia_l (0.03257 -0.0632 -0.00043)
      PathWrap: wrap_object=KnExt_at_fem_l method=hybrid
    Millard2012EquilibriumMuscle vaslat_l: max_isometric_force=5148.767 optimal_fiber_length=0.0994
        tendon_slack_length=0.2206013 pennation_angle_at_optimal=0.2528673
      PathPoint P1: femur_l (0.0048 -0.1854 -0.0349)
      PathPoint P2: femur_l (0.0269 -0.2591 -0.0409)
      PathPoint P3: patella_l (0.0103 0.0423 -0.0141)
      PathPoint P4: patella_l (0.005 0.00247 -0.00733)
      PathPoint P5: tibia_l (0.03254 -0.06338 -0.00511)
      PathWrap: wrap_object=KnExt_at_fem_l method=hybrid
    Millard2012EquilibriumMuscle vasmed_l: max_isometric_force=2747.823 optimal_fiber_length=0.0968
        tendon_slack_length=0.1999043 pennation_angle_at_optimal=0.4222225
      PathPoint P1: femur_l (0.014 -0.2099 -0.0188)
      PathPoint P2: femur_l (0.0356 -0.2769 -0.0009)
      PathPoint P3: patella_l (0.0063 0.0445 0.017)
      PathPoint P4: patella_l (0.005 0.00247 0.0085)
      PathPoint P5: tibia_l (0.0319 -0.06357 0.00678)
      PathWrap: wrap_object=KnExt_at_fem_l method=hybrid
    CoordinateActuator lumbar_ext: coordinate=lumbar_extension optimal_force=10
    CoordinateActuator lumbar_bend: coordinate=lumbar_bending optimal_force=10
    CoordinateActuator lumbar_rot: coordinate=lumbar_rotation optimal_force=10
    CoordinateActuator shoulder_flex_r: coordinate=arm_flex_r optimal_force=10
    CoordinateActuator shoulder_add_r: coordinate=arm_add_r optimal_force=10
    CoordinateActuator shoulder_rot_r: coordinate=arm_rot_r optimal_force=10
    CoordinateActuator elbow_flex_r: coordinate=elbow_flex_r optimal_force=10
    CoordinateActuator pro_sup_r: coordinate=pro_sup_r optimal_force=10
    CoordinateActuator wrist_flex_r: coordinate=wrist_flex_r optimal_force=10
    CoordinateActuator wrist_dev_r: coordinate=wrist_dev_r optimal_force=10
    CoordinateActuator shoulder_flex_l: coordinate=arm_flex_l optimal_force=10
    CoordinateActuator shoulder_add_l: coordinate=arm_add_l optimal_force=10
    CoordinateActuator shoulder_rot_l: coordinate=arm_rot_l optimal_force=10
    CoordinateActuator elbow_flex_l: coordinate=elbow_flex_l optimal_force=10
    CoordinateActuator pro_sup_l: coordinate=pro_sup_l optimal_force=10
    CoordinateActuator wrist_flex_l: coordinate=wrist_flex_l optimal_force=10
    CoordinateActuator wrist_dev_l: coordinate=wrist_dev_l optimal_force=10
    ObjectGroup right_leg: members=(addbrev_r addlong_r addmagDist_r addmagIsch_r addmagMid_r addmagProx_r bflh_r glmax1_r glmax2_r glmax3_r glmed1_r glmed2_r glmed3_r glmin1_r glmin2_r glmin3_r grac_r iliacus_r piri_r psoas_r recfem_r sart_r semimem_r semiten_r tfl_r)
    ObjectGroup left_leg: members=(addbrev_l addlong_l addmagDist_l addmagIsch_l addmagMid_l addmagProx_l bflh_l bfsh_l edl_l ehl_l fdl_l fhl_l gaslat_l gasmed_l glmax1_l glmax2_l glmax3_l glmed1_l glmed2_l glmed3_l glmin1_l glmin2_l glmin3_l grac_l iliacus_l perbrev_l perlong_l piri_l psoas_l recfem_l sart_l semimem_l semiten_l soleus_l tfl_l tibant_l tibpost_l vasint_l vaslat_l vasmed_l)
    ObjectGroup hip_add_r: members=(addbrev_r addlong_r addmagDist_r addmagIsch_r addmagMid_r addmagProx_r bflh_r grac_r semimem_r semiten_r)
    ObjectGroup hip_abd_r: members=(glmax1_r glmed1_r glmed2_r glmed3_r glmin1_r glmin2_r glmin3_r piri_r sart_r tfl_r)
    ObjectGroup hip_flex_r: members=(addbrev_r addlong_r glmin1_r grac_r iliacus_r psoas_r recfem_r sart_r tfl_r)
    ObjectGroup hip_ext_r: members=(addlong_r addmagDist_r addmagIsch_r addmagMid_r addmagProx_r bflh_r glmax1_r glmax2_r glmax3_r glmed1_r glmed2_r glmed3_r glmin3_r semimem_r semiten_r)
    ObjectGroup hip_inrot_r: members=(glmed1_r glmed2_r glmed3_r glmin1_r iliacus_r psoas_r tfl_r)
    ObjectGroup hip_exrot_r: members=(glmin3_r piri_r)
    ObjectGroup hip_add_l: members=(addbrev_l addlong_l addmagDist_l addmagIsch_l addmagMid_l addmagProx_l bflh_l grac_l semimem_l semiten_l)
    ObjectGroup hip_abd_l: members=(glmax1_l glmed1_l glmed2_l glmed3_l glmin1_l glmin2_l glmin3_l piri_l sart_l tfl_l)
    ObjectGroup hip_flex_l: members=(addbrev_l addlong_l glmin1_l grac_l iliacus_l psoas_l recfem_l sart_l tfl_l)
    ObjectGroup hip_ext_l: members=(addlong_l addmagDist_l addmagIsch_l addmagMid_l addmagProx_l bflh_l glmax1_l glmax2_l glmax3_l glmed1_l glmed2_l glmed3_l glmin3_l semimem_l semiten_l)
    ObjectGroup hip_exrot_l: members=(glmin3_l piri_l)
    ObjectGroup hip_inrot_l: members=(glmed1_l glmed2_l glmed3_l glmin1_l iliacus_l psoas_l tfl_l)
    ObjectGroup knee_flex_l: members=(bflh_l bfsh_l gaslat_l gasmed_l grac_l sart_l semimem_l semiten_l)
    ObjectGroup knee_ext_l: members=(recfem_l vasint_l vaslat_l vasmed_l)
    ObjectGroup ankle_df_l: members=(edl_l ehl_l tibant_l)
    ObjectGroup ankle_pf_l: members=(fdl_l fhl_l gaslat_l gasmed_l perbrev_l perlong_l soleus_l tibpost_l)
    ObjectGroup everter_l: members=(edl_l perbrev_l perlong_l)
    ObjectGroup inverter_l: members=(ehl_l fdl_l fhl_l tibant_l tibpost_l)
  MarkerSet:
    Marker FHD: torso (0.104905 0.60686 0)
    Marker BHD: torso (-0.0951853 0.60686 0)
    Marker LHD: torso (-0.00341139 0.60686 -0.0920516)
    Marker RHD: torso (-0.00341139 0.60686 0.0920516)
    Marker NOTCH: torso (0.0352611 0.382563 0)
    Marker XIPH: torso (0.098698 0.211847 0)
    Marker C7: torso (-0.07350974 0.4165689 0)
    Marker T10: torso (-0.08600082 0.1670049 0)
    Marker OFFSET: torso (-0.09529398 0.3221362 0.07758494)
    Marker LSHO: torso (0.00729671 0.42 -0.1358665)
    Marker LUARM: humerus_l (0 -0.1262629 -0.02)
    Marker LELBL: humerus_l (0.00175 -0.27674 -0.0366066)
    Marker LELBM: humerus_l (0.00729 -0.28128 0.0372339)
    Marker LFARM: ulna_l (-0.0419325 -0.0979747 -0.03)
    Marker LWRR: radius_l (-0.00173017 -0.231019 -0.0490404)
    Marker LWRU: radius_l (-0.020531 -0.231326 0.0197465)
    Marker LFIN: hand_l (-0.0174046 -0.0780738 0.000776556)
    Marker RSHO: torso (0.00729671 0.42 0.1358665)
    Marker RUARM: humerus_r (0 -0.126263 0.02)
    Marker RELBL: humerus_r (0.00175 -0.2767403 0.03660659)
    Marker RELBM: humerus_r (0.00729 -0.28128 -0.03723389)
    Marker RFARM: ulna_r (-0.04193253 -0.09797466 0.03)
    Marker RWRR: radius_r (-0.001730169 -0.2310189 0.0490404)
    Marker RWRU: radius_r (-0.020531 -0.2313262 -0.0197465)
    Marker RFIN: hand_r (-0.01740457 -0.07807379 -0.0007765561)
    Marker LASIS: pelvis (0.0129558 0.00340415 -0.128)
    Marker RASIS: pelvis (0.0129558 0.003404153 0.128)
    Marker LPSIS: pelvis (-0.147842 0.044036 -0.0533609)
    Marker RPSIS: pelvis (-0.147842 0.044036 0.0533609)
    Marker RTH1: socket_r (0.0007310006 0.065852 0.0726054)
    Marker RTH2: socket_r (0.0370679 0.019828 0.0726054)
    Marker RTH3: socket_r (0.005685901 -0.025979 0.0726054)
    Marker RTH4: socket_r (-0.0144883 0.019192 0.0726054)
    Marker RKNEL: prosknee_r (0 0 0.04)
    Marker RSK1: prosknee_r (-0.004096758 0.01898343 0.01392558)
    Marker RSK2: prosknee_r (0.02408089 -0.02161298 0.0006349907)
    Marker RSK3: prosknee_r (-0.004121038 -0.03021861 0.001640337)
    Marker RSK4: prosknee_r (-0.03397944 -0.01762161 0.01118781)
    Marker RHEE: prosfoot_bot_r (-0.01362116 0.009596614 0.008647114)
    Marker RANKL: prosfoot_top_r (0.02989884 0.08374137 -0.3322275)
    Marker RANKM: prosfoot_top_r (-0.0339613 0.1044371 -0.3163919)
    Marker RTOE: prosfoot_bot_r (0.03185577 0.00695177 0.006063397)
    Marker R5MT: prosfoot_bot_r (0.05032817 -0.005938943 0.06947524)
    Marker RHLX: prosfoot_bot_r (0.176486 -0.0246967 -0.00730463)
    Marker LTH1: femur_l (0.000730843 -0.156874 -0.072605)
    Marker LTH2: femur_l (0.0370677 -0.202898 -0.072605)
    Marker LTH3: femur_l (0.00568569 -0.248705 -0.072605)
    Marker LTH4: femur_l (-0.0144885 -0.203534 -0.072605)
    Marker LKNEL: femur_l (-4.6e-7 -0.4044252 -0.04404494)
    Marker LKNEM: femur_l (-4.6e-7 -0.4044252 0.04657546)
    Marker LSK1: tibia_l (-0.00712238 -0.124 -0.0585381)
    Marker LSK2: tibia_l (0.0220908 -0.175526 -0.0585381)
    Marker LSK3: tibia_l (-0.00712238 -0.213336 -0.0585381)
    Marker LSK4: tibia_l (-0.0309858 -0.174852 -0.0585381)
    Marker LANKL: tibia_l (-0.00491774 -0.408109 -0.0484547)
    Marker LANKM: tibia_l (0.0005 -0.3828047 0.03569935)
    Marker LHEE: calcn_l (-0.02 0.02 0)
    Marker LTOE: toes_l (0.000969931 0.0202 0.00166216)
    Marker L5MT: toes_l (-0.0348 0.0046 -0.05792)
    Marker LHLX: toes_l (0.056456 0.0202 0.020022)
    Marker LSJC: humerus_l (0 0 0)
    Marker LEJC: humerus_l (0.00452 -0.27901 0.00031365)
    Marker LWJC: radius_l (-0.0111306 -0.231173 -0.014647)
    Marker RSJC: humerus_r (0 0 0)
    Marker REJC: humerus_r (0.00452 -0.27901 -0.00031365)
    Marker RWJC: radius_r (-0.01113059 -0.2311725 0.01464695)
    Marker midLKNE: femur_l (-4.6e-7 -0.4044252 0)
    Marker midRANK: prosfoot_top_r (-0.03133653 0.09472724 -0.3295444)
    Marker midLANK: tibia_l (-0.00220887 -0.395457 -0.00637765)
    Marker RHJC: pelvis (-0.056276 -0.07849 0.07726)
    Marker LHJC: pelvis (-0.056276 -0.07849 -0.07726)
    Marker midPSI: pelvis (-0.147842 0.044036 0)
    Marker midASI: pelvis (0.0129558 0.00340415 0)
    Marker midPelvis: pelvis (-0.0674431 0.02372008 0)
    Marker midHJC: pelvis (-0.056276 -0.07849 0)
    Marker midSternum: torso (0.06697955 0.297205 0)
    Marker midBack: torso (-0.07975525 0.291787 0)
    Marker midNeck: torso (-0.0191243 0.399566 0)
    Marker pLTOE: toes_l (0.00097 -0.018 0.00166216)
    Marker pL5MT: toes_l (-0.0348 -0.018 -0.05792)
    Marker pRTOE: prosfoot_bot_r (0.04666194 -0.09320875 -0.2883355)
    Marker pR5MT: prosfoot_bot_r (0.02379765 -0.004889922 0.06381948)
    Marker pRHEE: prosfoot_bot_r (-0.003993223 -0.02660129 -0.3430981)
    Marker pLHEE: calcn_l (-0.02 -0.02 0)
    Marker pmidLANK: tibia_l (0.0005 -0.4612 -0.007)
    Marker pmidRANK: prosfoot_bot_r (0.02466947 -0.02982594 -0.2354148)
    Marker pmidLMT: toes_l (-0.0169 -0.018 -0.02812)
    Marker pmidRMT: prosfoot_bot_r (0.03812299 0.005077222 0.0394321)
